*Heading
** Job name: Jean2nd Model name: test
** Generated by: Abaqus/CAE 2020
*Preprint, echo=NO, model=NO, history=NO, contact=NO
**
** PARTS
**
*Part, name=MODEL-1
*Node
      1,           0., 2.42353008e-06,           0.
      2,          25., 2.42353008e-06,           0.
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*Element, type=C3D8R
    2,  1797,   101,     1,   147,  8508,  2349,   772,  2772
    3,  8508,  2349,   772,  2772,  8509,  2350,   773,  2773
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*Elset, elset=SET-1, generate
     2,  11521,      1
*Orientation, name=Ori-MODEL-1_ORI-1-DISCORIENT, system=RECTANGULAR
MODEL-1_ORI-1-DISCORIENT
2, 45.
** Section: Section-1-SET-1
*Solid Section, elset=SET-1, orientation=Ori-MODEL-1_ORI-1-DISCORIENT, material=AS4/8552
,
*Distribution, name=MODEL-1_ORI-1-DISCORIENT, location=ELEMENT, Table=MODEL-1_ORI-1-DISCORIENT_Table
,           1.,           0.,           0.,           0.,           1.,           0.
2,           1.,  3.83705e-06,           0., -3.83705e-06,           1., -8.18173e-06
3,           1.,   1.3262e-05,           0.,  -1.3262e-05,           1., -2.77321e-05
4,           1.,  4.37722e-05,           0., -4.37722e-05,           1., -8.60254e-05
5,           1.,   0.00012625,           0.,  -0.00012625,           1., -0.000198678
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11521,           1., -4.76835e-06,           0.,  4.76835e-06,           1.,  9.58045e-06
*End Part
**
**
** ASSEMBLY
**
*Assembly, name=Assembly
**
*Instance, name=MODEL-1-1, part=MODEL-1
*End Instance
**
*Nset, nset=FIXED-SIDE, instance=MODEL-1-1
     2,     4,     6,     8,    10,    12
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*Nset, nset=LOAD-SIDE, instance=MODEL-1-1
     1,     3,     5,     7,     9,    11
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*End Assembly
**
** MATERIALS
**
*Material, name=AS4/8552
*Elastic, type=ENGINEERING CONSTANTS
134000.,8480.,8480., 0.32, 0.32, 0.41,3600.,3600.
3000.,
*Distribution Table, name=MODEL-1_ORI-1-DISCORIENT_Table
coord3d, coord3d
** ----------------------------------------------------------------
**
** STEP: Step-1
**
*Step, name=Step-1, nlgeom=YES, inc=1000
*Static, stabilize=0.0002, allsdtol=0.5, continue=NO
0.1, 1., 1e-15, 0.1
**
** BOUNDARY CONDITIONS
**
** Name: Disp-BC-1 Type: Displacement/Rotation
*Boundary
LOAD-SIDE, 1, 1, 3.
** Name: Disp-BC-2 Type: Symmetry/Antisymmetry/Encastre
*Boundary
FIXED-SIDE, ENCASTRE
**
** OUTPUT REQUESTS
**
*Restart, write, number interval=1, time marks=NO
**
** FIELD OUTPUT: F-Output-1
**
*Output, field
*Node Output
CF, RF, U
**
** FIELD OUTPUT: F-Output-2
**
*Element Output, directions=YES
LE, S, SDEG, SDV, STATUS
**
** HISTORY OUTPUT: H-Output-1
**
*Output, history, variable=PRESELECT
*End Step
